// SBML level 2 version 1

model Glycolysis()

  // Compartments:
  compartment _000 in default;
  compartment _001 in default;
  compartment background in default; background is "999";

  // Species:
  species BPG13 in default; BPG13 is "1,3-BPG";
  species PGA3 in default; PGA3 is "3-PGA";
  species PGA2 in default; PGA2 is "2-PGA";
  species PEP in default;
  species PGK in default;
  species PGM in default;
  species ENO in default;
  species PYK in default;
  species Pyruvate in default;
  species G3P in default;
  species G3PD in default;

  // Reactions:
  re1: ignored => ignored; Michaelis_Menten;
    re1kp = 56.8; re1keq = 1e7; re1vm = 5000000; re1ka = 20000;
  re2: ignored => ignored; Michaelis_Menten;
    re2ka = 20900; re2kp = 2; re2keq = 670000; re2vm = 21000;
  re3: ignored => ignored; Michaelis_Menten;
    re3ka = 8.88008e7; re3kp = 50; re3keq = 8908477; re3vm = 589089;
  re4: ignored => ignored; Michaelis_Menten;
    re4ka = 0.002; re4kp = 0.53; re4vm = 357; re4keq = 3200;
  re5: ignored => ignored; Michaelis_Menten;
    re5ka = 9000000; re5kp = 1; re5keq = 0.9; re5vm = 5;
end
